// COMSOL Multiphysics 6.3.0.290 model "Untitled2D- 副本.mph"
// Outline of the model tree

Parameters
  R0 = 2[cm]  // 半径
  L = 25[cm]  // 长度
  rho = 820[kg/m^3]  // 密度
  cp = 2600[J/(kg*K)]  // 比热容
  k = 0.36[W/(m*K)]  // 导热系数
  hT = 25[W/(m^2*K)]  // 对流换热系数
  hm = 8e-7[m/s]  // 对流传质系数
  T0 = 28[degC]  // 初始温度
  C0 = 2.55  // 初始水分浓度
  D0 = 7e-9[m^2/s]  // 扩散系数前置因子

Functions
  int5: Interpolation "插值 1"
    funcnametable = {int1, 1}
    source = file
    filename = C:\Users\23854\Desktop\T_inf.txt
    funcname = int1
    filecolumns = 2
    columnKeys = {col1, col2}
    columnType = {col1, arg, col2, value}
    funcnames = {col1, int1, col2, T_inf}
    fununit = K
    argunit = s
  int6: Interpolation "插值 2"
    funcnametable = {int2, 1}
    source = file
    filename = C:\Users\23854\Desktop\C_inf.txt
    funcname = int2
    filecolumns = 2
    columnKeys = {col1, col2}
    columnType = {col1, arg, col2, value}
    funcnames = {col1, int2, col2, C_inf}
    fununit = kg/kg
    argunit = s

Geometry
  geom2 "几何 1" (2D axisymmetric, length unit cm)
    r1: Rectangle "矩形 1" | size = {2, 25}
    fin: Finalize "形成联合体"

Physics
  tds1: DilutedSpecies "稀物质传递1" on domains 1
    dependent variable c
    cdm1: Fluid "流体 1" (default) | D_c2 = D0*exp(-0.89/max(c/1[mol/m^3],1e-6))
    axi1: AxialSymmetry "轴对称 1" (default)
    nflx1: NoFlux "无通量 1" (default)
    init1: init "初始值 1" (default) | initc = C0
    fl1: FluxBoundary "通量 1" on all boundaries | FluxType = ExternalConvection; species = 1; kc = hm; cb = C_inf(t)
  ht1: PorousMediaHeatTransfer "多孔介质传热 1" on all domains
    dependent variable T
    porous1: PorousMediumHeatTransferModel "多孔介质 1" (default)
      fluid1: FluidPorousMediumHeatTransferModel "流体 1" (default)
        Cp_mat = userdef
        Cp = cp
        gamma_not_IG_mat = userdef
        gamma_not_IG = 1
        rho_mat = userdef
        rho = rho
        k_mat = userdef
        k = k
      pm1: PorousMatrixPorousMediumHeatTransferModel "多孔基体 1" (default)
        poro_mat = userdef
        poro = 0
        k_b_mat = userdef
        k_b = k
        rho_b_mat = userdef
        rho_b = rho
        Cp_b_mat = userdef
        Cp_b = cp
    init1: init "初始值 1" (default) | Tinit = T0
    axi1: AxialSymmetry "轴对称 1" (default)
    ins1: ThermalInsulation "热绝缘 1" (default)
    hf1: HeatFluxBoundary "热通量 1" on all boundaries | HeatFluxType = ConvectiveHeatFlux; h = hT; Text = T_inf(t)

Mesh
  mesh2 "网格1"
    size: MeshSizeDefault "大小" | hmax = 0.01
    map1: Map "映射 1" on remaining entities
      dis1: Distribution "分布 1" on all boundaries | numelem = 50
      dis2: Distribution "分布 2" on no boundaries | numelem = 100

Studies
  std1 "研究 1"
    time: Transient "瞬态" | tlist = range(0,50,1800)

Solver configurations
  sol1 "解 1" (study std1)
    v1: Variables "因变量 1"
    t1: Time "瞬态求解器 1"
      fc1: FullyCoupled "全耦合 1"
      d1: Direct "直接，传热变量 (ht1) (已合并)"

Datasets
  dset1: Solution | solution = sol1
  rev3: Revolve2D "二维旋转" | data = dset1

Plots
  pg7: PlotGroup2D "浓度 (tds1)" | data = dset1
    surf1: Surface "表面 1" | expr = c
    arws1: ArrowSurface "面上箭头 1" | expr = {tds1.tflux_cr, tds1.tflux_cz}; xnumber = 10; ynumber = 10
      sel1: Selection "选择 1" on domains 1
  pg9: PlotGroup2D "温度 (ht1)" | data = dset1; dataisaxisym = on
    surf1: Surface "表面 1" | expr = T
  pg10: PlotGroup3D "三维绘图组 g" | data = rev3
    slc1: Slice "切面 1" | expr = T; quickplane = xy; quickzmethod = coord; quickz = 12.5
  pg11: PlotGroup3D "三维绘图组 11" | data = rev3
    vol1: Volume "体 1" | data = rev3; expr = c
  pg12: PlotGroup2D "二维绘图组 12" | data = dset1
    surf1: Surface "表面 1" | data = dset1; expr = c

Exports
  img1: Image "图像 1" | size = current; unit = px; width = 800; height = 600
  img2: Image "图像 2" | size = current; unit = px; width = 800; height = 600